! Issue #393: package-owned independent percent/base fixture.
Clear
Set DefaultBaseFreq=50
New Circuit.interop phases=3 bus1=f.1.2.3 basekv=0.4 pu=1
New Transformer.tx phases=3 windings=2
~ wdg=1 bus=f.1.2.3 conn=delta kv=0.4 kva=10 %r=1 rneut=-1 tap=1
~ wdg=2 bus=t.1.2.3.4 conn=wye kv=0.2 kva=10 %r=1 rneut=-1 tap=1
~ XHL=4
~ %noloadloss=0 %imag=0 ppm_antifloat=0
Set Tolerance=1e-10
Solve
